*Heading
 M05 Small-setting reproduction
** Job name: m08_m2_1489 Model name: M05
** Generated by: Abaqus/CAE 2025
*Preprint, echo=NO, model=NO, history=NO, contact=NO
**
** PARTS
**
*Part, name=PART-1
*Node
      1,     -11.5625,       8.4375,         -20.
      2,     -11.5625,    8.3173151,   -19.895834
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*Element, type=C3D4
     1,  61936,  88724,  61461,  98189
     2,   6316,   6317,   6873,  96256
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*Elset, elset=EVOL, generate
      1,  333168,       1
*Elset, elset=ALL, generate
      1,  333168,       1
*Nset, nset=M05_FIX
  7534,  7536,  8236,  8238,  8240,  8241
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*Nset, nset=M05_DRIVE
 32430, 32431, 32432, 32433, 32879, 32880
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*Nset, nset=M05_ZFIX
    1,    4,    6,    8,   10,   12
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*Nset, nset=M05_ZDRIVE, generate
 87298,  87988,      1
** Section: Section-1
*Solid Section, elset=ALL, material=tpu-wenext
,
*End Part
**
**
** ASSEMBLY
**
*Assembly, name=Assembly
**
*Instance, name=PART-1-1, part=PART-1
*End Instance
**
*Nset, nset=A_DRIVE, instance=PART-1-1
 32430, 32431, 32432, 32433, 32879, 32880
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*Nset, nset=A_FIX, instance=PART-1-1
  7534,  7536,  8236,  8238,  8240,  8241
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*Nset, nset=A_YNEG, instance=PART-1-1
 18044, 18056, 18066, 18075, 18384, 18398
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*Nset, nset=A_YPOS, instance=PART-1-1
 17880, 17892, 17902, 18240, 18253, 18264
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*Nset, nset=A_ZNEG, instance=PART-1-1
    1,    4,    6,    8,   10,   12
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*Nset, nset=A_ZPOS, instance=PART-1-1, generate
 87298,  87988,      1
*End Assembly
**
** MATERIALS
**
*Material, name=tpu-wenext
*Density
 1e-09,
*Hyperelastic, n=2, test data input, poisson=0.47
*Uniaxial Test Data
 -0.0096,     0.
  0.0024, 0.0002
  0.0174, 0.0011
 0.03264,  0.002
 0.04968, 0.0028
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 4.01904, 1.0003
*Plastic
 0.78423,        0.
 1.35487, 0.0116319
 2.15677, 0.0249853
  2.7908, 0.0439207
 3.37279, 0.0679816
 3.91174, 0.0920318
 4.42433,  0.114195
 4.92701,  0.138108
 5.44151,  0.161523
 5.92832,  0.187184
 6.39031,  0.215918
** ----------------------------------------------------------------
**
** STEP: Step-1 (M08 explicit z, plan 0-C)
**
*Step, name=Step-1, nlgeom=YES
*Dynamic, Explicit
, 0.1
*Fixed Mass Scaling, type=BELOW MIN, dt=1e-06
**
** AMPLITUDE
**
*Amplitude, name=A_SMOOTH_DRIVE, definition=SMOOTH STEP
0., 0., 0.1, 1.
**
** BOUNDARY CONDITIONS
**
** Name: BC-z-drive Type: Displacement/Rotation
*Boundary, amplitude=A_SMOOTH_DRIVE
A_ZPOS, 3, 3, -10.0
** Name: BC-z-fix Type: Displacement/Rotation
*Boundary
A_ZNEG, 3, 3
** Name: BC-x-neg-side Type: Displacement/Rotation
*Boundary
A_FIX, 1, 1
** Name: BC-x-pos-side Type: Displacement/Rotation
*Boundary
A_DRIVE, 1, 1
** Name: BC-y-neg Type: Displacement/Rotation
*Boundary
A_YNEG, 2, 2
** Name: BC-y-pos Type: Displacement/Rotation
*Boundary
A_YPOS, 2, 2
**
** OUTPUT REQUESTS
**
**
** FIELD OUTPUT: F-Output-1
**
*Output, field, number interval=20
*Node Output
U
*Element Output, directions=YES
S, SENER
**
** HISTORY OUTPUT: H-Output-1
**
*Output, history, time interval=0.005
*Energy Output
ALLIE, ALLKE, ALLAE, ALLPD, ETOTAL
**
** HISTORY OUTPUT: H-Drive
**
*Node Output, nset=A_ZPOS
RF3, U3
*End Step
